*Heading
** Job name: Job-FixedBC Model name: Fixed_BC_Model
** Generated by: Abaqus/CAE 2020
*Preprint, echo=NO, model=NO, history=NO, contact=NO
**
** PARTS
**
*Part, name=Part-1
*End Part
**
**
** ASSEMBLY
**
*Assembly, name=Assembly
**
*Instance, name=Part-1-1, part=Part-1
*Node
      1,           0.,  0.190088198,           0.
      2,           0.,  0.190088198,          20.
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*Element, type=C3D8I
  1,    1,   19,  474,  106,  198,  894, 2622,  864
  2,   19,   20,  475,  474,  894,  895, 2623, 2622
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*Element, type=C3D6
3841,  17,  62,   3, 473, 668,  63
3842,  60,  61,  17, 590, 629, 473
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*Nset, nset=Set-1, generate
    1,  4961,     1
*Elset, elset=Set-1, generate
    1,  4800,     1
** Section: Section-1
*Solid Section, elset=Set-1, material=Plant_A
,
*End Instance
**
*Node
      1, 1.11022302e-16, 9.18485073e-17,           0.
*Node
      2,           0., -3.91659564e-17,          20.
*Nset, nset=Dips_5, instance=Part-1-1
   33,   87,  121,  175,  221,  270
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*Nset, nset=Dips_6, instance=Part-1-1
   28,   92,  116,  180,  216,  265
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*Nset, nset=Dips_7, instance=Part-1-1
   23,   97,  111,  185,  211,  260
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*Nset, nset=Disp_1, instance=Part-1-1
   53,   67,  141,  155,  241,  290
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*Nset, nset=Disp_2, instance=Part-1-1
   48,   72,  136,  160,  236,  285
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*Nset, nset=Disp_3, instance=Part-1-1
   43,   77,  131,  165,  231,  280
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*Nset, nset=Disp_4, instance=Part-1-1
   38,   82,  126,  170,  226,  275
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*Elset, elset=Set-9, instance=Part-1-1
   40,   80,  120,  160,  200,  240
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*Elset, elset=Set-17, instance=Part-1-1
  760,  800,  840,  880,  920,  960
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*Nset, nset=Set-19, instance=Part-1-1
 8,
*Nset, nset=Set-22
 1,
*Nset, nset=Set-23
 1,
*Nset, nset=Set-24
 1,
*Nset, nset=Set-28, instance=Part-1-1
    2,    3,    6,    7,   10,   12
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*Elset, elset=Set-28, instance=Part-1-1
   40,   80,  120,  160,  200,  240
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*Elset, elset=Set-31, instance=Part-1-1
  760,  800,  840,  880,  920,  960
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*Nset, nset=Set-35
 2,
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*Nset, nset=m_Set-34
 2,
*Nset, nset=m_Set-47
 1,
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*Elset, elset=p_Set-20, instance=Part-1-1
    1,   41,   81,  121,  161,  201
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*Nset, nset=p_Set-25, instance=Part-1-1
    2,    3,    6,    7,   10,   12
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*Elset, elset=p_Set-25, instance=Part-1-1
   40,   80,  120,  160,  200,  240
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*Elset, elset=_s_Surf-1_S1, internal, instance=Part-1-1
 3817, 3818, 3819, 3820, 3821, 3822
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*Elset, elset=_s_Surf-1_S6, internal, instance=Part-1-1, generate
 1921,  2841,    40
*Elset, elset=_s_Surf-1_S4, internal, instance=Part-1-1, generate
   40,  1920,    40
*Elset, elset=_s_Surf-1_S2, internal, instance=Part-1-1
 4555, 4556, 4557, 4558, 4559, 4560, 4795, 4796, 4797, 4798, 4799, 4800
*Surface, type=ELEMENT, name=s_Surf-1
_s_Surf-1_S1, S1
_s_Surf-1_S6, S6
_s_Surf-1_S4, S4
_s_Surf-1_S2, S2
*Elset, elset=_s_Surf-2_S4, internal, instance=Part-1-1, generate
 1960,  2880,    40
*Elset, elset=_s_Surf-2_S2, internal, instance=Part-1-1
 2881, 2882, 2883, 2884, 2885, 2886
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*Elset, elset=_s_Surf-2_S1, internal, instance=Part-1-1
 4321, 4322, 4323, 4324, 4325, 4326, 4561, 4562, 4563, 4564, 4565, 4566
*Elset, elset=_s_Surf-2_S6, internal, instance=Part-1-1, generate
    1,  1881,    40
*Surface, type=ELEMENT, name=s_Surf-2
_s_Surf-2_S4, S4
_s_Surf-2_S2, S2
_s_Surf-2_S6, S6
_s_Surf-2_S1, S1
** Constraint: Constraint-Base
*Coupling, constraint name=Constraint-Base, ref node=m_Set-34, surface=s_Surf-1
*Distributing, weighting method=UNIFORM
** Constraint: Constraint-Top
*Coupling, constraint name=Constraint-Top, ref node=m_Set-47, surface=s_Surf-2
*Distributing, weighting method=UNIFORM
*End Assembly
**
** MATERIALS
**
*Material, name=Plant_A
*Density
 0.00458817,
*Elastic
6500., 0.25
**
** BOUNDARY CONDITIONS
**
** Name: BC-Fixed Type: Displacement/Rotation
*Boundary
Set-35, 1, 1
Set-35, 2, 2
Set-35, 3, 3
Set-35, 4, 4
Set-35, 5, 5
Set-35, 6, 6
** ----------------------------------------------------------------
**
** STEP: Step-1
**
*Step, name=Step-1, nlgeom=NO
*Static
1., 1., 1e-05, 1.
**
** BOUNDARY CONDITIONS
**
** Name: BC-Fixed Type: Displacement/Rotation
*Boundary
Set-35, 4, 4
Set-35, 5, 5
Set-35, 6, 6
**
** LOADS
**
** Name: Self_Weight   Type: Gravity
*Dload
, GRAV, 384., 0., 0., 1.
** Name: Spike_Load_Rev   Type: Concentrated force
*Cload
Set-24, 3, 0.054
** Name: Theta_Base_Effect_Additional_Rev   Type: Concentrated force
*Cload
Set-23, 1, 0.15
** Name: WindRev   Type: Concentrated force
*Cload
Set-22, 1, 0.25
**
** OUTPUT REQUESTS
**
*Restart, write, frequency=0
**
** FIELD OUTPUT: F-Output-1
**
*Output, field, variable=PRESELECT
**
** HISTORY OUTPUT: Disp5
**
*Output, history
*Node Output, nset=Dips_5
U1,
**
** HISTORY OUTPUT: Disp6
**
*Node Output, nset=Dips_6
U1,
**
** HISTORY OUTPUT: Disp7
**
*Node Output, nset=Dips_7
U1,
**
** HISTORY OUTPUT: Disp1
**
*Node Output, nset=Disp_1
U1,
**
** HISTORY OUTPUT: Disp2
**
*Node Output, nset=Disp_2
U1,
**
** HISTORY OUTPUT: Disp3
**
*Node Output, nset=Disp_3
U1,
**
** HISTORY OUTPUT: Disp4
**
*Node Output, nset=Disp_4
U1,
*End Step
